# Учебная практика по использованию Mathcad
# Выполнил Галустов Григорий
# студент К3-23Б
# 11 июля 2019 года
# Данные:
A := [
    79, -106, 160, -136, 135, -109, 29;
    159, -214, 321, -272, 270, -218, 58;
    239, -321, 480, -407, 405, -327, 87;
    319, -428, 640, -544, 541, -436, 116;
    399, -535, 800, -680, 675, -544, 145;
    479, -642, 960, -816, 810, -654, 175;
    559, -749, 1120, -952, 945, -763, 204
]
B := [-939; -1888; -2835; -3779; -4719; -5670; -6615]
# Задача №1:
x_1 := lsolve(A, B) = [-2; 4; -7.71746e-13; -2; -1; 4; -2]
sum(A[6, i]*x_1[i], i = 0 .. 6) = -6615
# Задача №2:
|A| = 52
# Задача №3:
x_2 := A^-1*B = [-2; 4; 0; -2; -1; 4; -2]
# Задача №4:
|A*x_1 - B| = 2.54211e-13
|A*x_2 - B| = 5.18618e-9
x_1 - x_2 = [2.45359e-12; 1.7617e-12; -7.71746e-13; 2.28351e-12; 5.28755e-12; -2.49045e-12; -4.13936e-12]
# Задача №5:
ORIGIN := 1
t1 := sum(sum(|A[i, j]|^2, j = 1 .. rank(A)), i = 1 .. rank(A))^(1/2) = 3605.66
t2 := norme(A) = 3605.66
t1 - t2 = 0
# Задача №6: Au=λu
eigenvals(A) = [26; 0.5 + 1.32288i; 0.5 - 1.32288i; 4.01457e-13 + 1i; 4.01457e-13 - 1i; -0.5 + 0.866025i; -0.5 - 0.866025i]
eigenvec(A, 26) = [-0.0846903; -0.169381; -0.254071; -0.338761; -0.423446; -0.508011; -0.589444]
# 26 - единственное собственное значение матрицы A, которое входит в множество действительных чисел.
# Задача №7:
# [3D plot: A]
