# Учебная практика по использованию Mathcad
# Выполнил Галустов Григорий
# студент К3-23Б
# 11 июля 2019 года
# Вариант 26
# Данные:
A := [
    79, -106, 160, -136, 135, -109, 29;
    159, -214, 321, -272, 270, -218, 58;
    239, -321, 480, -407, 405, -327, 87;
    319, -428, 640, -544, 541, -436, 116;
    399, -535, 800, -680, 675, -544, 145;
    479, -642, 960, -816, 810, -654, 175;
    559, -749, 1120, -952, 945, -763, 204
]
B := [-939; -1888; -2835; -3779; -4719; -5670; -6615]
# Задание №1:
x[1] := lsolve(A, B) = [-2; 4; -2.52367e-12; -2; -1; 4; -2]
# Задание №2:
|A| = 52
# Задание №3:
x[2] := A^-1*B = [-2; 4; -3.63798e-12; -2; -1; 4; -2]
# Задание №4:
||A*x[1] - B|| = 1.63961e-12
||A*x[2] - B|| = 1.2902e-8
# Задание №5:
ORIGIN := 1
sum(sum(|A[i, j]|^2, j = 1 .. 7), i = 1 .. 7)^(1/2) = 3605.66
norme(A) = 3605.66
# Задание №6:
eigenvals(A) = [26; 0.5 + 1.32288i; 0.5 - 1.32288i; 2.22721e-12 + 1i; 2.22721e-12 - 1i; -0.5 + 0.866025i; -0.5 - 0.866025i]
eigenvec(A, 26) = [-0.0846903; -0.169381; -0.254071; -0.338761; -0.423446; -0.508011; -0.589444]
# Задание №7:
# [component: inputs A]
