data := [20.0100; 20.0031; 20.0061; 20.0022; 20.0067; 20.0086; 20.0038; 20.0006; 20.0072; 20.0063; 20.0010; 20.0064; 20.0015; 20.0030; 20.0058; 20.0055; 20.0052; 20.0065; 20.0028; 20.0091; 20.0107; 20.0003; 20.0052; 20.0046; 20.0033; 20.0002; 20.0050; 20.0220; 20.0060; 20.0043]
n := length(data) = 30
m := mean(data) = 20.0054
s1 := stdev(data) = 0.00410466
s2 := s1/sqrt(n) = 0.000749405
int := [20; 20.002; 20.004; 20.006; 20.008; 20.022]
Obs := hist(int, data)
Obs = [5; 6; 7; 7; 5]
i := 1 .. length(int) - 1
P[i] := pnorm(int[i], m, s1)
P(bin) := P[bin] - P[bin - 1]
Exp[i - 1] := P(i)*n
Exp = [6.04354; 4.86058; 5.74292; 5.3764; 7.97574]
t := 2.045
chi_squared := sum(vectorize((Obs - Exp)^2/Exp)) = 2.32301
dx := t*s2 = 0.00153253
x := m±dx  # error: Эта переменная не определена.
a := 0.05
df := length(Obs) - 3 = 2
x := 20.005±0.0015  # error: Число содержит недопустимый символ "±".
P := 1 - pchisq(chi_squared, df) = 0.313015
P ≥ a = 1
# Использованные источники:
# http://support.ptc.com/help/mathcad/en/index.html#page/PTC_Mathcad_Help%2Fexample_chi_square_test_for_goodness_of_fit.html%23
# https://turbofuture.com/computers/excels-easiest-and-most-robust-normality-test-the-chi-square-goodness-of-fit-test
# https://stattrek.com/anova/normality/normality-test.aspx
