# [component: outputs time]
# [component: outputs data]
t := sort(time)
z(time) := supsmooth(time, data)
z(time) := supsmooth(time, data)
s := cspline(time, data)
v(x) := interp(s, time, z(time), x)
L(t) := [1; t; t^2; t^3; t^4; t^5; t^6; t^7; t^8]
K := linfit(t, z(time), L)
K = [0.642184; 0.0101869; -0.00556583; 0.00107084; -0.000102649; 5.33561e-6; -1.53382e-7; 2.28971e-9; -1.38234e-11]
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t := 0, 0.1 .. 45
M(t) := K*L(t)
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D := sort(data)
H := histogram(7, D) = [0.299429, 2; 0.368286, 3; 0.437143, 6; 0.506, 12; 0.574857, 36; 0.643714, 32; 0.712571, 20]
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D = [
    0.265; 0.279; 0.348; 0.352; 0.39; 0.42; 0.432; 0.441; 0.458; 0.463
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]
m := mean(D) = 0.59527
std := stdev(D) = 0.0945485
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