# [component: outputs time]
# [component: outputs data]
t := sort(time)
z(time) := supsmooth(time, data)
z(time) := supsmooth(time, data)
s := cspline(time, data)
v(x) := interp(s, time, z(time), x)
L(t) := [1; t; t^2; t^3; t^4; t^5; t^6; t^7; t^8]
K := linfit(t, z(time), L)
K = [5.54614; 9.68651; -4.71765; 0.886529; -0.0891467; 0.00525006; -0.000181966; 3.44587e-6; -2.75535e-8]
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t := 9, 9.1 .. 24
M(t) := K*L(t)
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